<?xml version="1.0"?>
<?xml-stylesheet type="text/xsl" href="http://jsbsim.sourceforge.net/JSBSim.xsl"?>
<fdm_config name="Embraer-195" version="2.0" release="ALPHA"
  xmlns:xsi="http://www.w3.org/2001/XMLSchema-instance"
  xsi:noNamespaceSchemaLocation="http://jsbsim.sourceforge.net/JSBSim.xsd">

  <fileheader>
    <author> Aeromatic v 0.91 </author>
    <author> Isaias Valente Prestes </author>
    <filecreationdate> 2009-09-12 </filecreationdate>
    <version>$Revision: 1.10 $</version>
    <description>Embraer e-Jet 195 LR</description>
  </fileheader>

  <!--
  File:     Embraer-195.xml
  Inputs:
    name:          Embraer-195 LR
    type:          two-engine transonic transport
    max weight:    111991.95 lb
    wing span:     94.23032 ft
    length:        126.81065 ft
    wing area:     995.7625 sq-ft
    gear type:     tricycle
    retractable?:  yes
    # engines:     2
    engine type:   turbine
    engine layout: wings
    yaw damper?    yes
  Outputs:
    wing loading:  112.47 lb/sq-ft
    CL-alpha:      4.4 per radian
    CL-0:          0.2
    CL-max:        1.2
    CD-0:          0.02
    K:             0.043

    Reference:

    * Roy Langton, Chuck Clark, Martin Hewitt, Lonnie Richards, "Aircraft Fuel Systems"
      Wiley | 2009-07-27 | ISBN: 0470057084, 156347963X | 366 pages
	* SmartCockpit - http://www.smartcockpit.com/pdf/plane/embraer/EMBRAER-190-195
	* EMBRAER 195 - Airport Planning Manual
		http://www.embraercommercialjets.com/img/download/216.pdf
		http://www.embraercommercialjets.com/img/download/217.pdf


	License:

     =========================================
     Prestes Hangar - 2009 - Embraer Project
     =========================================
           http://presteshangar.blogspot.com

           Creation :   September 08, 2009 05:22:14 AM
           Last update: October 05, 2009 06:48:45 PM
     ======================================================================
     Contributions :
          Isaas V. Prestes <isaias.prestes at gmail dot com >
     ======================================================================
  -->

  <metrics>
    <wingarea unit="M2">  92.50 </wingarea>
    <wingspan unit="M">   28.72 </wingspan>
    <wing_incidence>      2.00 </wing_incidence>
    <chord unit="FT">     10.57 </chord>
    <htailarea unit="M2"> 26.00 </htailarea> <!-- aeromatic - 248.94 ft2 -->
    <htailarm unit="M">   12.08 </htailarm> <!-- aeromatic - 57.06 ft -->
    <vtailarea unit="M2"> 16.20 </vtailarea> <!-- aeromatic - 199.15 ft2 -->
    <vtailarm unit="M">   10.57 </vtailarm> <!-- aeromatic - 57.06 ft -->
    <location name="AERORP" unit="M">
      <x> 17.5826 </x>
      <y>   0.00 </y>
      <z>   0.00 </z>
    </location>
    <location name="EYEPOINT" unit="M">
      <x> 3.12434 </x>
      <y> -0.482301 </y>
      <z> -0.5 </z>
    </location>
    <location name="VRP" unit="M">
      <x>0</x>
      <y>0</y>
      <z>0</z>
    </location>
  </metrics>

  <mass_balance>
    <ixx unit="SLUG*FT2">    289523 </ixx>
    <iyy unit="SLUG*FT2">   1211437 </iyy>
    <izz unit="SLUG*FT2">   1348415 </izz>
    <emptywt unit="LBS">     63868 </emptywt> <!-- aero 67195 -->
    <location name="CG" unit="M">
      <x> 17.5826 </x>
      <y>   0.00 </y>
      <z> 0.250853 </z>
    </location>
  </mass_balance>

  <ground_reactions>

    <contact type="BOGEY" name="NOSE">
	   <location unit="M">
		 <x> 4.1566 </x>
		 <y>   0.00 </y>
		 <z> -2.19876 </z>
	   </location>
      <static_friction>  0.80 </static_friction>
      <dynamic_friction> 0.50 </dynamic_friction>
      <rolling_friction> 0.02 </rolling_friction>
      <spring_coeff unit="LBS/FT">      33597.58 </spring_coeff>
      <damping_coeff unit="LBS/FT/SEC"> 11199.19 </damping_coeff>
      <max_steer unit="DEG"> 76.00 </max_steer>
      <brake_group>NONE</brake_group>
      <retractable>1</retractable>
    </contact>

    <contact type="BOGEY" name="LEFT_MAIN">
	   <location unit="M">
		 <x> 18.8753 </x>
		 <y> -2.94601 </y>
		 <z> -2.55347 </z>
	   </location>
      <static_friction>  0.80 </static_friction>
      <dynamic_friction> 0.50 </dynamic_friction>
      <rolling_friction> 0.02 </rolling_friction>
      <spring_coeff unit="LBS/FT">      111991.95 </spring_coeff>
      <damping_coeff unit="LBS/FT/SEC"> 22398.39 </damping_coeff>
      <max_steer unit="DEG">0</max_steer>
      <brake_group>LEFT</brake_group>
      <retractable>1</retractable>
    </contact>

    <contact type="BOGEY" name="RIGHT_MAIN">
	   <location unit="M">
		 <x> 18.8753 </x>
		 <y>  2.94601 </y>
		 <z> -2.55347 </z>
	   </location>
      <static_friction>  0.80 </static_friction>
      <dynamic_friction> 0.50 </dynamic_friction>
      <rolling_friction> 0.02 </rolling_friction>
      <spring_coeff unit="LBS/FT">      111991.95 </spring_coeff>
      <damping_coeff unit="LBS/FT/SEC"> 22398.39 </damping_coeff>
      <max_steer unit="DEG">0</max_steer>
      <brake_group>RIGHT</brake_group>
      <retractable>1</retractable>
    </contact>

    <contact type="STRUCTURE" name="LEFT_WING">
	   <location unit="M">
		 <x> 21.7691 </x>
		 <y> -13.9264 </y>
		 <z> 0.921893 </z>
	   </location>
      <static_friction>  0.80 </static_friction>
      <dynamic_friction> 0.50 </dynamic_friction>
      <spring_coeff unit="LBS/FT">      111991.95 </spring_coeff>
      <damping_coeff unit="LBS/FT/SEC"> 22398.39 </damping_coeff>
    </contact>

    <contact type="STRUCTURE" name="RIGHT_WING">
	   <location unit="M">
		 <x> 21.7691 </x>
		 <y> 13.9264 </y>
		 <z> 0.921893 </z>
	   </location>
      <static_friction>  0.80 </static_friction>
      <dynamic_friction> 0.50 </dynamic_friction>
      <spring_coeff unit="LBS/FT">      111991.95 </spring_coeff>
      <damping_coeff unit="LBS/FT/SEC"> 22398.39 </damping_coeff>
    </contact>

  </ground_reactions>

  <propulsion>

    <engine file="GECF3410E">
      <location unit="M">
        <x> 15.2321 </x>
        <y> -4.51112 </y>
        <z> -0.927856 </z>
      </location>
      <orient unit="DEG">
        <pitch> 0.00 </pitch>
        <roll>   0.00 </roll>
        <yaw>   0.00 </yaw>
      </orient>
      <feed>0</feed>
      <feed>1</feed>
      <thruster file="direct">
      <location unit="M">
        <x> 15.2321 </x>
        <y> -4.51112 </y>
        <z> -0.927856 </z>
      </location>
        <orient unit="DEG">
          <pitch> 0.00 </pitch>
          <roll>   0.00 </roll>
          <yaw>   0.00 </yaw>
        </orient>
      </thruster>
    </engine>

    <engine file="GECF3410E">
      <location unit="M">
        <x> 15.2321 </x>
        <y>  4.51112 </y>
        <z> -0.927856 </z>
      </location>
      <orient unit="DEG">
        <pitch> 0.00 </pitch>
        <roll>   0.00 </roll>
        <yaw>   0.00 </yaw>
      </orient>
      <feed>1</feed>
      <feed>0</feed>
      <thruster file="direct">
      <location unit="M">
        <x> 15.2321 </x>
        <y>  4.51112 </y>
        <z> -0.927856 </z>
      </location>
        <orient unit="DEG">
          <pitch> 0.00 </pitch>
          <roll>   0.00 </roll>
          <yaw>   0.00 </yaw>
        </orient>
      </thruster>
    </engine>

    <tank type="FUEL" number="0">
		<location unit="M">
		  <x> 17.3826 </x>
		  <y> -5.34799 </y>
		  <z> 0.250853 </z>
		</location>
      <capacity unit="LBS"> 14440.5 </capacity>
      <contents unit="LBS"> 7220.25 </contents>
    </tank>

    <tank type="FUEL" number="1">
		<location unit="M">
		  <x> 17.3826 </x>
		  <y>  5.34799 </y>
		  <z> 0.250853 </z>
		</location>
      <capacity unit="LBS"> 14440.5 </capacity>
      <contents unit="LBS"> 7220.25 </contents>
    </tank>

  </propulsion>

 <system file="Embraer195-pushback"/>
 <system file="Embraer195-NWS"/>
 <system file="Embraer195-crash-detect"/>
 <system file="Embraer195-particles"/>
 <system file="Embraer195-gear"/>
 <system file="Embraer195-flaps"/>
 <system file="Embraer195-slats"/>
 <system file="Embraer195-speedbrakes"/>
 <system file="FCS-pitch"/>
 <system file="FCS-roll"/>
 <system file="FCS-yaw"/>
 <!--
 <system file="alpha_buffet"/>
 <system file="dump"/>
 <system file="radar"/>
 <system file="reverser"/>
-->
<system file="Embraer195-over-g"/>

  <flight_control name="FCS: Embraer-195">

  </flight_control>

  <aerodynamics>

    <axis name="LIFT">

      <function name="aero/coefficient/CLalpha">
        <description>Lift_due_to_alpha</description>
        <product>
          <property>aero/qbar-psf</property>
          <property>metrics/Sw-sqft</property>
          <table>
            <independentVar lookup="row">aero/alpha-rad</independentVar>
            <tableData>
              -0.20 -0.680
               0.00 0.200
             0.23    1.200
               0.60 0.600
            </tableData>
          </table>
        </product>
      </function>

      <function name="aero/coefficient/dCLflap">
        <description>Delta_Lift_due_to_flaps</description>
        <product>
          <property>aero/qbar-psf</property>
          <property>metrics/Sw-sqft</property>
          <property>fcs/flap-pos-deg</property>
          <value> 0.05000 </value>
        </product>
      </function>

      <function name="aero/coefficient/dCLsb">
        <description>Delta_Lift_due_to_speedbrake</description>
        <product>
          <property>aero/qbar-psf</property>
          <property>metrics/Sw-sqft</property>
          <property>fcs/speedbrake-pos-norm</property>
          <value>-0.1</value>
        </product>
      </function>

      <function name="aero/coefficient/CLde">
        <description>Lift_due_to_Elevator_Deflection</description>
        <product>
          <property>aero/qbar-psf</property>
          <property>metrics/Sw-sqft</property>
          <property>fcs/elevator-pos-rad</property>
          <value>0.2</value>
        </product>
      </function>

    </axis>

    <axis name="DRAG">

      <function name="aero/coefficient/CD0">
        <description>Drag_at_zero_lift</description>
        <product>
          <property>aero/qbar-psf</property>
          <property>metrics/Sw-sqft</property>
          <table>
            <independentVar lookup="row">aero/alpha-rad</independentVar>
            <tableData>
             -1.57       1.500
             -0.26    0.026
              0.00    0.020
              0.26    0.026
              1.57       1.500
            </tableData>
          </table>
        </product>
      </function>

      <function name="aero/coefficient/CDi">
        <description>Induced_drag</description>
        <product>
          <property>aero/qbar-psf</property>
          <property>metrics/Sw-sqft</property>
          <property>aero/cl-squared</property>
          <value>0.043</value>
        </product>
      </function>

      <function name="aero/coefficient/CDmach">
        <description>Drag_due_to_mach</description>
        <product>
          <property>aero/qbar-psf</property>
          <property>metrics/Sw-sqft</property>
          <table>
            <independentVar lookup="row">velocities/mach</independentVar>
            <tableData>
                0.00      0.000
                0.79      0.000
                1.10      0.023
                1.80      0.015
            </tableData>
          </table>
        </product>
      </function>

      <function name="aero/coefficient/CDflap">
        <description>Drag_due_to_flaps</description>
        <product>
          <property>aero/qbar-psf</property>
          <property>metrics/Sw-sqft</property>
          <property>fcs/flap-pos-deg</property>
          <value> 0.00197 </value>
        </product>
      </function>

      <function name="aero/coefficient/CDgear">
        <description>Drag_due_to_gear</description>
        <product>
          <property>aero/qbar-psf</property>
          <property>metrics/Sw-sqft</property>
          <property>gear/gear-pos-norm</property>
          <value>0.015</value>
        </product>
      </function>

      <function name="aero/coefficient/CDsb">
        <description>Drag_due_to_speedbrakes</description>
        <product>
          <property>aero/qbar-psf</property>
          <property>metrics/Sw-sqft</property>
          <property>fcs/speedbrake-pos-norm</property>
          <value>0.02</value>
        </product>
      </function>

      <function name="aero/coefficient/CDbeta">
        <description>Drag_due_to_sideslip</description>
        <product>
          <property>aero/qbar-psf</property>
          <property>metrics/Sw-sqft</property>
          <table>
            <independentVar lookup="row">aero/beta-rad</independentVar>
            <tableData>
              -1.57       1.230
              -0.26    0.050
               0.00       0.000
               0.26    0.050
               1.57       1.230
            </tableData>
          </table>
        </product>
      </function>

      <function name="aero/coefficient/CDde">
        <description>Drag_due_to_Elevator_Deflection</description>
        <product>
          <property>aero/qbar-psf</property>
          <property>metrics/Sw-sqft</property>
          <abs>
            <property>fcs/elevator-pos-norm</property>
          </abs>
          <value>0.04</value>
        </product>
      </function>

    </axis>

    <axis name="SIDE">

      <function name="aero/coefficient/CYb">
        <description>Side_force_due_to_beta</description>
        <product>
          <property>aero/qbar-psf</property>
          <property>metrics/Sw-sqft</property>
          <property>aero/beta-rad</property>
          <value>-1</value>
        </product>
      </function>

    </axis>

    <axis name="ROLL">

      <function name="aero/coefficient/Clb">
        <description>Roll_moment_due_to_beta</description>
        <product>
          <property>aero/qbar-psf</property>
          <property>metrics/Sw-sqft</property>
          <property>metrics/bw-ft</property>
          <property>aero/beta-rad</property>
          <value>-0.1</value>
        </product>
      </function>

      <function name="aero/coefficient/Clp">
        <description>Roll_moment_due_to_roll_rate</description>
        <product>
          <property>aero/qbar-psf</property>
          <property>metrics/Sw-sqft</property>
          <property>metrics/bw-ft</property>
          <property>aero/bi2vel</property>
          <property>velocities/p-aero-rad_sec</property>
          <value>-0.4</value>
        </product>
      </function>

      <function name="aero/coefficient/Clr">
        <description>Roll_moment_due_to_yaw_rate</description>
        <product>
          <property>aero/qbar-psf</property>
          <property>metrics/Sw-sqft</property>
          <property>metrics/bw-ft</property>
          <property>aero/bi2vel</property>
          <property>velocities/r-aero-rad_sec</property>
          <value>0.15</value>
        </product>
      </function>

      <function name="aero/coefficient/Clda">
        <description>Roll_moment_due_to_aileron</description>
        <product>
          <property>aero/qbar-psf</property>
          <property>metrics/Sw-sqft</property>
          <property>metrics/bw-ft</property>
          <property>fcs/left-aileron-pos-rad</property>
          <table>
            <independentVar lookup="row">velocities/mach</independentVar>
            <tableData>
              0.0    0.100
              2.0    0.033
            </tableData>
          </table>
        </product>
      </function>

      <function name="aero/coefficient/Cldr">
        <description>Roll_moment_due_to_rudder</description>
        <product>
          <property>aero/qbar-psf</property>
          <property>metrics/Sw-sqft</property>
          <property>metrics/bw-ft</property>
          <property>fcs/rudder-pos-rad</property>
          <value>0.01</value>
        </product>
      </function>

    </axis>

    <axis name="PITCH">

      <function name="aero/coefficient/Cmalpha">
        <description>Pitch_moment_due_to_alpha</description>
        <product>
          <property>aero/qbar-psf</property>
          <property>metrics/Sw-sqft</property>
          <property>metrics/cbarw-ft</property>
          <property>aero/alpha-rad</property>
          <value>-0.6</value>
        </product>
      </function>

      <function name="aero/coefficient/Cmde">
        <description>Pitch_moment_due_to_elevator</description>
        <product>
          <property>aero/qbar-psf</property>
          <property>metrics/Sw-sqft</property>
          <property>metrics/cbarw-ft</property>
          <property>fcs/elevator-pos-rad</property>
          <table>
            <independentVar lookup="row">velocities/mach</independentVar>
            <tableData>
              0.0     -1.200
              2.0     -0.300
            </tableData>
          </table>
        </product>
      </function>

      <function name="aero/coefficient/Cmq">
        <description>Pitch_moment_due_to_pitch_rate</description>
        <product>
          <property>aero/qbar-psf</property>
          <property>metrics/Sw-sqft</property>
          <property>metrics/cbarw-ft</property>
          <property>aero/ci2vel</property>
          <property>velocities/q-aero-rad_sec</property>
          <value>-17</value>
        </product>
      </function>

      <function name="aero/coefficient/Cmadot">
        <description>Pitch_moment_due_to_alpha_rate</description>
        <product>
          <property>aero/qbar-psf</property>
          <property>metrics/Sw-sqft</property>
          <property>metrics/cbarw-ft</property>
          <property>aero/ci2vel</property>
          <property>aero/alphadot-rad_sec</property>
          <value>-6</value>
        </product>
      </function>

    </axis>

    <axis name="YAW">

      <function name="aero/coefficient/Cnb">
        <description>Yaw_moment_due_to_beta</description>
        <product>
          <property>aero/qbar-psf</property>
          <property>metrics/Sw-sqft</property>
          <property>metrics/bw-ft</property>
          <property>aero/beta-rad</property>
          <value>0.12</value>
        </product>
      </function>

      <function name="aero/coefficient/Cnr">
        <description>Yaw_moment_due_to_yaw_rate</description>
        <product>
          <property>aero/qbar-psf</property>
          <property>metrics/Sw-sqft</property>
          <property>metrics/bw-ft</property>
          <property>aero/bi2vel</property>
          <property>velocities/r-aero-rad_sec</property>
          <value>-0.15</value>
        </product>
      </function>

      <function name="aero/coefficient/Cndr">
        <description>Yaw_moment_due_to_rudder</description>
        <product>
          <property>aero/qbar-psf</property>
          <property>metrics/Sw-sqft</property>
          <property>metrics/bw-ft</property>
          <property>fcs/rudder-pos-rad</property>
          <value>-0.1</value>
        </product>
      </function>

      <function name="aero/coefficient/Cnda">
        <description>Adverse_yaw</description>
        <product>
          <property>aero/qbar-psf</property>
          <property>metrics/Sw-sqft</property>
          <property>metrics/bw-ft</property>
          <property>fcs/left-aileron-pos-rad</property>
          <value>0</value>
        </product>
      </function>

    </axis>

  </aerodynamics>

<external_reactions>
	 <force name="pushback" frame="BODY">
	   <location unit="M">
		 <x> 4.1566 </x>
		 <y>   0.00 </y>
		 <z> -2.19876 </z>
	   </location>
	  <direction>
	   <x>1</x>
	   <y>0</y>
	   <z>0</z>
	  </direction>
	 </force>
</external_reactions>


</fdm_config>
